*Heading
** Job name: Job-2 Model name: c_clamp_device
** Generated by: Abaqus/CAE Learning Edition 2025
*Preprint, echo=NO, model=NO, history=NO, contact=NO
**
** PARTS
**
*Part, name=c_clamp
*Node
      1,        -250.,        -100.
      2,        -250.,        -150.
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*Element, type=CPE4R
 1,   1,  19, 187,  58
 2,  19,  20, 188, 187
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*Nset, nset=_PickedSet7, internal, generate
   1,  405,    1
*Elset, elset=_PickedSet7, internal, generate
   1,  320,    1
** Section: c_clamp_section
*Solid Section, elset=_PickedSet7, material=structural_steel
500.,
*End Part
**
**
** ASSEMBLY
**
*Assembly, name=Assembly
**
*Instance, name=c_clamp-1, part=c_clamp
*End Instance
**
*Nset, nset=_PickedSet4, internal, instance=c_clamp-1
  15,  16, 118, 119, 120
*Elset, elset=_PickedSet4, internal, instance=c_clamp-1, generate
 197,  200,    1
*Elset, elset=__PickedSurf5_S4, internal, instance=c_clamp-1, generate
  89,  133,    4
*Surface, type=ELEMENT, name=_PickedSurf5, internal
__PickedSurf5_S4, S4
*Elset, elset=__PickedSurf6_S2, internal, instance=c_clamp-1, generate
 204,  248,    4
*Surface, type=ELEMENT, name=_PickedSurf6, internal
__PickedSurf6_S2, S2
*End Assembly
**
** MATERIALS
**
*Material, name=structural_steel
*Elastic
200000., 0.3
**
** BOUNDARY CONDITIONS
**
** Name: fixed_node Type: Symmetry/Antisymmetry/Encastre
*Boundary
_PickedSet4, PINNED
** ----------------------------------------------------------------
**
** STEP: load_step
**
*Step, name=load_step, nlgeom=NO, unsymm=NO
*Static
1., 1., 1e-05, 1.
**
** LOADS
**
** Name: left_pressure   Type: Pressure
*Dsload
_PickedSurf5, P, 1.33333
** Name: right_pressure   Type: Pressure
*Dsload
_PickedSurf6, P, 1.33333
**
** OUTPUT REQUESTS
**
*Restart, write, frequency=0
**
** FIELD OUTPUT: F-Output-1
**
*Output, field
*Node Output
RT, UT
*Element Output, directions=YES
E, S
**
** HISTORY OUTPUT: H-Output-1
**
*Output, history, variable=PRESELECT
*End Step
